// COMSOL Multiphysics 6.4.0.293 model ".saved_g35_model.mph.tmp.mph"
// Outline of the model tree

Geometry
  geom1 "几何 1" (3D, length unit m)
    blk1: Block "长方体 1" | size = {0.05, 0.02, 0.01}
    fin: Finalize "形成联合体"

Materials
  mat1: Common "材料 1" on all domains
    def: def "基本"
      thermalconductivity = 400[W/(m*K)]
      density = 8960[kg/m^3]
      heatcapacity = 385[J/(kg*K)]

Physics
  ht: HeatTransfer "固体传热" on all domains
    dependent variable T
    solid1: SolidHeatTransferModel "固体 1" (default)
    init1: init "初始值 1" (default)
    ins1: ThermalInsulation "热绝缘 1" (default)
    temp1: TemperatureBoundary "温度 1" on boundaries 1 | T0 = 300[K]
    temp2: TemperatureBoundary "温度 2" on boundaries 6 | T0 = 350[K]

Mesh
  mesh1 "网格 1" (physics-controlled)

Studies
  std1 "研究 1"
    time: Transient "瞬态" | tlist = range(0, 0.5, 1.0)

Solver configurations
  sol1 "解 1" (study std1)
    v1: Variables "因变量 1"
    t1: Time "瞬态求解器 1"
      fc1: FullyCoupled "全耦合 1"
      d1: Direct "直接，传热变量 (ht)"

Datasets
  dset1: Solution | solution = sol1

Plots
  pg3d: PlotGroup3D "三维绘图组" | data = dset1; title = 温度 (K)
    surf1: Surface "表面 1" | expr = T
  pg1d: PlotGroup1D "一维绘图组" | data = dset1
    ptg1: PointGraph "点结果图 1" | expr = T

Exports
  img1: Image "图像 1"
    pngfilename = /Users/everwalker/Downloads/COMSOL_MCP_G3_5_WORKPACK_gemini/repository/evidence/g3_5_acceptance_20260923T142306Z/plots/g02_existing_export.png
  exp_g03_restore: Image "图像" | pngfilename = orig_file_for_g03_restore_test.png