// COMSOL Multiphysics 6.4.0.293 model "phase2_refined_h006.mph"
// Outline of the model tree

Geometry
  geom1 "几何 1" (2D, length unit m)
    r1: Rectangle "矩形 1"
    fin: Finalize "形成联合体"

Physics
  c: CoefficientFormPDE "系数形式偏微分方程" on all domains
    dependent variable u
    cfeq1: CoefficientFormPDE "系数形式偏微分方程 1" (default) | c = {1, 0, 0, 1}; a = 1; f = 2; da = 1
    zflx1: ZeroFluxBoundary "零通量 1" (default)
    init1: init "初始值 1" (default)

Mesh
  mesh1 "网格 1"
    size: MeshSizeDefault "大小" | hmax = 0.006; hmin = 0.003; hgrad = 1.2; custom = on
    ftri1: FreeTri "自由三角形网格 1" on remaining entities | smoothmaxiter = 4; smoothmaxdepth = 4

Studies
  std1 "研究 1"
    stat: Stationary "稳态"

Solver configurations
  sol1 "解 1" (study std1)
    v1: Variables "因变量 1"
    s1: Stationary "稳态求解器 1"
      dDef: Direct "直接"
      fc1: FullyCoupled "全耦合 1"

Datasets
  dset1: Solution | solution = sol1

Derived values
  max1: MaxSurface "表面最大值 1" on domains 1 | data = dset1; expr = abs(u-2)

Plots
  pg1: PlotGroup2D "二维绘图组 1" | data = dset1
    surf1: Surface "表面 1" | expr = u