// COMSOL Multiphysics 6.4.0.293 model ".chain_c_user_style.mph.tmp.mph"
// Outline of the model tree

Geometry
  geom1 "几何 1" (3D, length unit m)
    blk1: Block "长方体 1" | size = {0.03, 0.02, 0.01}
    fin: Finalize "形成联合体"
  geom2 "几何 2" (3D, length unit m)
    blk1: Block "长方体 1" | size = {0.015, 0.01, 0.005}
    fin: Finalize "形成联合体"

Materials
  mat1: Common "材料 1" on domains 1
    def: def "基本"
      thermalconductivity = 0.45[W/(m*K)]
      density = 2200[kg/m^3]
      heatcapacity = 880[J/(kg*K)]
  mat2: Common "材料 2" on no domains
    def: def "基本"
      thermalconductivity = 1[W/(m*K)]
      density = 1000[kg/m^3]
      heatcapacity = 1000[J/(kg*K)]

Physics
  ht: HeatTransfer "固体传热" on all domains
    dependent variable T
    solid1: SolidHeatTransferModel "固体 1" (default)
    init1: init "初始值 1" (default) | Tinit_src = userdef; Tinit = 293.15
    ins1: ThermalInsulation "热绝缘 1" (default)
    temp1: TemperatureBoundary "温度 1" on no boundaries | T0 = 353.15
    hf1: HeatFluxBoundary "热通量 1" on no boundaries
  ht2: HeatTransfer "固体传热 2" on all domains
    dependent variable T2
    solid1: SolidHeatTransferModel "固体 1" (default)
    init1: init "初始值 1" (default)
    ins1: ThermalInsulation "热绝缘 1" (default)

Mesh
  mesh1 "网格 1"
    size: MeshSizeDefault "大小" | hauto = 4
    auto_f1: FreeTet "自由四面体网格 1" on remaining entities | optcurved = on

Studies
  std1 "G3 chain C user-style continuation model"
    time: Transient "瞬态" | tlist = {0, 0.5, 1, 2, 5}

Solver configurations
  sol1 "解 1" (study std1)
    v1: Variables "因变量 1"
    t1: Time "瞬态求解器 1" | rtol = 1.0E-5
      se1: Segregated "分离 1"
        ss1: SegregatedStep "温度"
        ss2: SegregatedStep "温度 (2)"
        ll1: LowerLimit "下限 1"
      d1: Direct "直接，传热变量 (ht)"
      d2: Direct "直接，传热变量 (ht2)"

Datasets
  dset1: Solution | solution = sol1