// COMSOL Multiphysics 6.4.0.293 model ".chainB_result.mph.tmp.mph"
// Outline of the model tree

Geometry
  geom1 "几何 1" (3D, length unit m)
    blk1: Block "长方体 1" | size = {0.01, 0.01, 0.005}
    fin: Finalize "形成联合体"

Materials
  mat1: Common "材料 1" on domains 1
    def: def "基本"
      thermalconductivity = 10[W/(m*K)]
      density = 1000[kg/m^3]
      heatcapacity = 1000[J/(kg*K)]

Physics
  ht: HeatTransfer "固体传热" on all domains
    dependent variable T
    solid1: SolidHeatTransferModel "固体 1" (default)
    init1: init "初始值 1" (default) | Tinit = 300.0[K] + 20.0[K]*sin(pi*x/0.01[m])
    ins1: ThermalInsulation "热绝缘 1" (default)
    temp1: TemperatureBoundary "温度 1" on boundaries 1, 6 | T0 = 300.0[K]

Mesh
  mesh1 "网格 1"
    size: MeshSizeDefault "大小" | hmax = 0.001; hmin = 1.8E-4; hcurve = 0.6; hnarrow = 0.5; hgrad = 1.5
    size1: Size "大小 1" on entire geometry | hauto = 3
    ftet1: FreeTet "自由四面体网格 1" on remaining entities

Studies
  std1 "G3 chain B transient"
    time: Transient "瞬态" | tlist = {0, 0.5, 1, 2, 4}; usertol = on; rtol = 1.0E-5

Solver configurations
  sol1 "解 1" (study std1)
    v1: Variables "因变量 1"
    t1: Time "瞬态求解器 1"
      fc1: FullyCoupled "全耦合 1"
      d1: Direct "直接，传热变量 (ht)"

Datasets
  dset1: Solution | solution = sol1