// COMSOL Multiphysics 6.4.0.293 model ".bench_c07_solved.mph.tmp.mph"
// Outline of the model tree

Geometry
  geom1 "几何 1" (2D axisymmetric, length unit m)
    r1: Rectangle "矩形 1" | size = {2.0, 3.0}; pos = {0.0, 0.0}
    fin: Finalize "形成联合体" | symmetriccoord = 8

Materials
  mat1: Common "材料 1" on all domains
    def: def "基本"
      thermalconductivity = 400[W/(m*K)]
      density = 8960[kg/m^3]
      heatcapacity = 385[J/(kg*K)]

Physics
  ht: HeatTransfer "固体传热" on all domains
    dependent variable T
    solid1: SolidHeatTransferModel "固体 1" (default)
    init1: init "初始值 1" (default)
    axi1: AxialSymmetry "轴对称 1" (default)
    ins1: ThermalInsulation "热绝缘 1" (default)
    temp1: TemperatureBoundary "温度 1" on all boundaries | T0 = 300.0[K]

Mesh
  mesh1 "网格 1" (physics-controlled)
    size: MeshSizeDefault "大小" | hauto = 3

Studies
  std1 "研究 1"
    stat: Stationary "稳态"

Solver configurations
  sol1 "解 1" (study std1)
    v1: Variables "因变量 1"
    s1: Stationary "稳态求解器 1"
      fc1: FullyCoupled "全耦合 1"
      d1: Direct "直接，传热变量 (ht)"

Datasets
  dset1: Solution | solution = sol1