// COMSOL Multiphysics 6.4.0.293 model ".w21_final.mph.tmp.mph"
// Outline of the model tree

Parameters
  L = 0.05[m]
  k = 400.0[W/(m*K)]
  rhoCp = 3800000.0[J/(m^3*K)]

Geometry
  geom1 "几何 1" (3D, length unit m)
    blk1: Block "长方体 1" | size = {L, L/5, L/5}
    fin: Finalize "形成联合体"

Materials
  mat1: Common "材料 1" on all domains
    def: def "基本"
      thermalconductivity = k
      density = 1.0[kg/m^3]
      heatcapacity = rhoCp/(1[kg/m^3])

Physics
  ht: HeatTransfer "固体传热" on all domains
    dependent variable T
    solid1: SolidHeatTransferModel "固体 1" (default)
    init1: init "初始值 1" (default) | Tinit = 300[K] + 10[K]*sin(pi*x/L)
    ins1: ThermalInsulation "热绝缘 1" (default)
    temp1: TemperatureBoundary "温度 1" on boundaries 1 | T0 = 300[K]
    temp2: TemperatureBoundary "温度 2" on boundaries 6 | T0 = 300[K]

Mesh
  mesh1 "网格 1"
    size: MeshSizeDefault "大小" | hauto = 2
    auto_f1: FreeTet "自由四面体网格 1" on remaining entities

Studies
  std1 "研究 1"
    time: Transient "瞬态" | tlist = {0, 0.5, 1, 1.5, 2}; usertol = on; rtol = 1e-6
  std2 "研究 2"
    time: Transient "瞬态"
      tlist = {2, 2.5, 3, 3.5, 4}
      usertol = on
      rtol = 1e-6
      useinitsol = on
      initmethod = sol
      initstudy = std1

Solver configurations
  sol1 "解 1" (study std1)
    v1: Variables "因变量 1"
    t1: Time "瞬态求解器 1"
      fc1: FullyCoupled "全耦合 1"
      d1: Direct "直接，传热变量 (ht)"
  sol2 "解 2" (study std2)
    v1: Variables "因变量 1"
    t1: Time "瞬态求解器 1"
      fc1: FullyCoupled "全耦合 1"
      d1: Direct "直接，传热变量 (ht)"

Datasets
  dset1: Solution | solution = sol1
  dset2: Solution | solution = sol2