// COMSOL Multiphysics 6.4.0.293 model ".w21_final.mph.tmp.mph"
// Outline of the model tree

Parameters
  L = 1[m]
  k = 1[W/(m*K)]
  rhoCp = 1[J/(m^3*K)]

Geometry
  geom1 "几何 1" (3D, length unit m)
    blk1: Block "长方体 1" | size = {L, 0.1[m], 0.1[m]}
    fin: Finalize "形成联合体"

Materials
  mat1: Common "材料 1" on all domains
    def: def "基本"
      thermalconductivity = k
      density = 1.0[kg/m^3]
      heatcapacity = rhoCp/(1[kg/m^3])

Physics
  ht: HeatTransfer "固体传热" on all domains
    dependent variable T
    solid1: SolidHeatTransferModel "固体 1" (default)
    init1: init "初始值 1" (default) | T = 300[K] + 10[K]*sin(pi*x/L)
    ins1: ThermalInsulation "热绝缘 1" (default)
    temp1: TemperatureBoundary "温度 1" on boundaries 1 | T0 = 300[K]
    temp2: TemperatureBoundary "温度 2" on boundaries 6 | T0 = 300[K]

Mesh
  mesh1 "网格 1"
    swe1: Sweep "扫掠 1" on remaining entities | sourceface = boundaries 1; targetface = boundaries 6
      dis1: Distribution "分布 1" on all domains
        explicit = {0, 0.03125, 0.0625, 0.09375, 0.125, 0.15625, 0.1875, 0.21875, 0.25, 0.28125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}

Studies
  std1 "研究 1"
    time: Transient "瞬态" | tlist = {0, 0.01, 0.03, 0.1}; usertol = on; rtol = 1e-7

Solver configurations
  sol1 "解 1" (study std1)
    v1: Variables "因变量 1"
    t1: Time "瞬态求解器 1"
      fc1: FullyCoupled "全耦合 1"
      d1: Direct "直接，传热变量 (ht)"

Datasets
  dset1: Solution | solution = sol1