// COMSOL Multiphysics 6.3.0.290 model ".saved_6.3.mph.tmp.mph"
// Outline of the model tree

Parameters
  L = 0.05[m]
  T_left = 300[K]
  T_right = 350[K]
  k_val = 400[W/(m*K)]

Selections
  sel1: Explicit "显式 1" on boundaries 1, 6

Geometry
  geom1 "几何 1" (3D, length unit m)
    blk1: Block "长方体 1" | size = {L, 0.02[m], 0.01[m]}
    fin: Finalize "形成联合体"
  geom2 "几何 2" (3D, length unit m)
    wp1: WorkPlane "工作平面 1"
      rectA: Rectangle "矩形" | size = {0.01[m], 0.01[m]}
    fin: Finalize "形成联合体"

Materials
  mat1: Common "材料 1" on all domains
    def: def "基本"
      thermalconductivity = k_val
      density = 8960[kg/m^3]
      heatcapacity = 385[J/(kg*K)]

Physics
  ht: HeatTransfer "固体传热" on all domains
    dependent variable T
    solid1: SolidHeatTransferModel "固体 1" (default)
    init1: init "初始值 1" (default)
    ins1: ThermalInsulation "热绝缘 1" (default)
    temp1: TemperatureBoundary "温度 1" on boundaries 1 | T0 = T_left
    temp2: TemperatureBoundary "温度 2" on boundaries 6 | T0 = T_right

Mesh
  mesh1 "网格 1" (physics-controlled)

Studies
  std1 "研究 1"
    stat: Stationary "稳态"
  std2 "研究 2"
    time: Transient "瞬态" | tlist = range(0, 0.5, 1.0)

Solver configurations
  sol1 "解 1" (study std1)
    v1: Variables "因变量 1"
    s1: Stationary "稳态求解器 1"
      fc1: FullyCoupled "全耦合 1"
      d1: Direct "直接，传热变量 (ht)"
  sol2 "解 2" (study std2)
    v1: Variables "因变量 1"
    t1: Time "瞬态求解器 1"
      fc1: FullyCoupled "全耦合 1"
      d1: Direct "直接，传热变量 (ht)"

Datasets
  dset1: Solution | solution = sol1
  dset2: Solution | solution = sol2

Plots
  pg3d: PlotGroup3D "三维绘图组" | data = dset1
    surf1: Surface "表面 1" | expr = T
  pg1d: PlotGroup1D "一维绘图组" | data = dset1
    ptg1: PointGraph "点结果图 1" | expr = T